#2D-In2Se3
variable        TEMP            equal 300.000000
variable        PRES            equal 1.000000
variable        TAU_T           equal 0.100000
variable        TAU_P           equal 0.500000

units           metal
boundary        p p p
atom_style      atomic

neighbor        1.0 bin

box          tilt large
read_data     conf.lmp
change_box   all triclinic
mass            1 114.818000
mass            2 78.960000
pair_style      deepmd /home/liushiLab/bailiyi/In2Se3dpModel/frozen_model.pb
pair_coeff


group   in  type 1
group   se  type 2

timestep        0.001000

thermo          1
thermo_style    custom step pe ke etotal temp press vol cella cellb cellc cellalpha cellbeta cellgamma

#velocity        all create ${TEMP} 431696
fix             1 all npt temp ${TEMP} ${TEMP} ${TAU_T} x ${PRES} ${PRES} ${TAU_P} y ${PRES} ${PRES} ${TAU_P}

compute    ql  all orientorder/atom degrees 3 4 6 8 nnn NULL cutoff 5.0

dump  2 all custom 1 dumpql.xyz id element x y z c_ql[1] c_ql[2] c_ql[3] fx fy fz
dump_modify 2 sort 1 element In Se

#dump  1 all custom 1 In2Se3.lammpstrj id type x y z

run             1
